#Restart file for the sedimentation test case

atom_style	granular
atom_modify	map array
communicate	single vel yes

boundary	f f f
newton		off

units		si
processors	1 1 2

#read the restart file
read_restart 	../DEM/liggghts.restart

#do not do this here, the simulation box is in the restart file!
#region		reg block -0.015 0.015 -0.015 0.015 -0.001 0.0554 units box
#create_box	1 reg

neighbor	0.010000 bin
neigh_modify	delay 0

#Material properties required for new pair styles

fix 		m1 all property/global youngsModulus peratomtype 5.e6
fix 		m2 all property/global poissonsRatio peratomtype 0.45
fix 		m3 all property/global coefficientRestitution peratomtypepair 1 0.3
fix 		m4 all property/global coefficientFriction peratomtypepair 1 0.5
fix 		m5 all property/global characteristicVelocity scalar 1.0

#pair style
pair_style 	gran model hertz tangential history #Hertzian without cohesion but with tangential force
pair_coeff	* *

#timestep, gravity
timestep	0.000005 # check that tomorrow
fix		gravi all gravity 10 vector 0.0 0.0 -1.0

#walls
fix			zwalls1 all wall/gran model hertz tangential history   primitive type 1  zplane 0.0
fix			zwalls2 all wall/gran model hertz tangential history   primitive type 1  zplane 0.25
fix			xwalls1 all wall/gran model hertz tangential history   primitive type 1  xplane 0.0
fix			xwalls2 all wall/gran model hertz tangential history   primitive type 1  xplane 0.05
fix			ywalls1 all wall/gran model hertz tangential history   primitive type 1  yplane 0.0
fix			ywalls2 all wall/gran model hertz tangential history   primitive type 1  yplane 0.05

# change the particles density
set             group all density 1500

#cfd coupling
fix		cfd all couple/cfd couple_every 100 mpi
fix		cfd2 all couple/cfd/force/accumulator RongDrag 1000 1e-3


#apply nve integration to all particles that are inserted as single particles
fix		integr all nve/sphere

#compute total dragforce
compute		dragtotal all reduce sum f_dragforce[1] f_dragforce[2] f_dragforce[3]

#screen output
compute		1 all erotate/sphere
thermo_style	custom step atoms ke c_1 vol c_dragtotal[1] c_dragtotal[2] c_dragtotal[3]
thermo		20
thermo_modify	lost ignore norm no
compute_modify	thermo_temp dynamic no

#insert the first particles so that dump is not empty
dump 		myDump all stl 1 post/dump_*.stl
#run		1
dump		dmp all custom 500 ../DEM/post/dump*.liggghts_restart id type type x y z vx vy vz fx fy fz f_dragforce[1] f_dragforce[2] f_dragforce[3] radius
undump		myDump

run		1
